# OpenSim document version 40000
Model osim_robot:
  gravity: 0 0 0
  Ground
  BodySet:
    Body body_0: mass=1 [kg] mass_center=(0 0 0) inertia=(1 1 1 0 0 0)
      PhysicalOffsetFrame: socket_parent=.. orientation=(1.570796 0 0) [radians]
        Cylinder _geom_1: radius=0.5 half_height=0.5
      PhysicalOffsetFrame physicaloffsetframe_0: socket_parent=.. translation=(0 0.75 0) [meters]
        Brick _geom_1: half_lengths=(0.1 0.75 0.25)
      PhysicalOffsetFrame physicaloffsetframe_1: socket_parent=.. translation=(0 1.5 0) orientation=(1.570796 0 0)
        Cylinder _geom_1: radius=0.25 half_height=0.5
    Body body_1: mass=1 mass_center=(0 0 0) inertia=(1 1 1 0 0 0)
      PhysicalOffsetFrame: socket_parent=.. orientation=(1.570796 0 0)
        Cylinder _geom_1: radius=0.5 half_height=0.5
      PhysicalOffsetFrame physicaloffsetframe_0: socket_parent=.. translation=(0 0.75 0)
        Brick _geom_1: half_lengths=(0.1 0.75 0.25)
      PhysicalOffsetFrame physicaloffsetframe_1: socket_parent=.. translation=(0 1.5 0) orientation=(1.570796 0 0)
        Cylinder _geom_1: radius=0.25 half_height=0.5
  JointSet:
    PinJoint joint_0: socket_parent_frame=ground_offset socket_child_frame=body_0_offset
      Coordinate joint_0_coord_0
      PhysicalOffsetFrame ground_offset: socket_parent=/ground translation=(0 1.5 0)
      PhysicalOffsetFrame body_0_offset: socket_parent=/bodyset/body_0 translation=(0 0 0)
    PinJoint joint_1: socket_parent_frame=body_0_offset socket_child_frame=body_1_offset
      Coordinate joint_1_coord_0
      PhysicalOffsetFrame body_0_offset: socket_parent=/bodyset/body_0 translation=(0 1.5 0)
      PhysicalOffsetFrame body_1_offset: socket_parent=/bodyset/body_1 translation=(0 0 0)
  ForceSet:
    CoordinateActuator joint_0_coord_0_user: coordinate=joint_0_coord_0
    CoordinateActuator joint_0_coord_0_control: coordinate=joint_0_coord_0
    CoordinateActuator joint_1_coord_0_user: coordinate=joint_1_coord_0
    CoordinateActuator joint_1_coord_0_control: coordinate=joint_1_coord_0
    Millard2012EquilibriumMuscle muscle: min_control=0.01 max_control=1 max_isometric_force=1 optimal_fiber_length=1
        tendon_slack_length=1 pennation_angle_at_optimal=1 [radians] minimum_activation=0.01
      PathPoint origin: body_0 (0 0 0)
      PathPoint insertion: body_1 (0 0 0)
      ActiveForceLengthCurve: minimum_value=0
      ForceVelocityCurve: concentric_slope_at_vmax=0 concentric_slope_near_vmax=0.25 isometric_slope=5
          eccentric_slope_at_vmax=0 eccentric_slope_near_vmax=0.15 max_eccentric_velocity_force_multiplier=1.4
      FiberForceLengthCurve
      TendonForceLengthCurve
  MarkerSet:
    Marker effector_ref: body_1 (0 1.5 0)
