# OpenSim document version 30000
Model Leg:
  length_units: meters
  force_units: N
  gravity: 0 -9.80665 0
  credits:
    Frank Anderson, Peter Loan, Ayman Habib, Ajay Seth, Michael Sherman
  BodySet:
    Body ground: mass=0 mass_center=(0 0 0) inertia_xx=1 inertia_yy=1 inertia_zz=1
    Body femur: mass=20 mass_center=(0 0 0) inertia_xx=0.1333333 inertia_yy=1.133333 inertia_zz=1.133333
      PinJoint hip: parent_body=ground location_in_parent=(0 0 0) location=(-0.2 0.05 0)
        Coordinate hip_coord_0: motion_type=rotational
    Body tibia: mass=20 mass_center=(0 0 0) inertia_xx=0.1333333 inertia_yy=1.133333 inertia_zz=1.133333
      PinJoint knee: parent_body=femur location_in_parent=(0.2 0.05 0) location=(-0.2 0.05 0)
        Coordinate knee_coord_0: motion_type=rotational
  MarkerSet:
    Marker tibia_ref_X: tibia (0.2 0.05 0)
    Marker tibia_ref_Y: tibia (0.2 0.05 0)
